!   Commands inserted into this file will be executed just prior to the ANSYS SOLVE command.
!   These commands may supersede command settings set by Workbench.

!   Active UNIT system in Workbench when this object was created:  Metric (mm, t, N, s, mV, mA)
!   NOTE:  Any data that requires units (such as mass) is assumed to be in the consistent solver unit system.
!                See Solving Units in the help system for more information.

! Place in the Modal analysis system
! Expand modes in a modal analysis given a threshold for use in downstream analysis.


/solu
antype,modal		! Specify modal analysis type
mxpand,-1			! Don't expand and do not write modes to the results file during the analysis

outres,all,none		! Don't write any output
outres,nsol,all		! Output all nodal DOF solution items
!outres,esol,all		! Output all element solution items (comment if desired to control individual items)

! Individual element solution items (comment if esol,all is active)
outres,strs,all		! Output element nodal stresses
outres,nload,all	! Output all element nodal, input constraint, and force loads
outres,misc,all		! Output element miscellaneous data (ETABLE SMISC and NMISC items)

solve
fini

/solu
antype,modal,restart
! Calculate element results, reaction forces, energies, and nodal DOF solution, restricting selection of modes to
! those that have modal effective mass ratio above significance threshold = .001 here
mxpand,,,,yes,0.001,,EFFM
modseloption,yes,yes,yes,yes,yes,yes		! Select modes in all 6 Cartesian directions
