!   Commands inserted into this file will be executed immediately after the ANSYS /POST1 command.

!   Active UNIT system in Workbench when this object was created:  Metric (mm, t, N, s, mV, mA)
!   NOTE:  Any data that requires units (such as mass) is assumed to be in the consistent solver unit system.
!                See Solving Units in the help system for more information.

!!!!!!!!!!!!!!!!!!!!!!!!!!!!!!!!!!!!!!!!!!!!!!!!!!!!!!!!!!!!!!!!!!!!!!!!!!!!!!!!!!!
!  Commands place in the Solution Branch to get nodal reaction forces and moments
!  NOTE: Save MAPDL db = Yes in Analysis Settings
!  Uses nodal named selection as component
!!!!!!!!!!!!!!!!!!!!!!!!!!!!!!!!!!!!!!!!!!!!!!!!!!!!!!!!!!!!!!!!!!!!!!!!!!!!!!!!!!!

RESUME											! Resume the database from the database file
FINISH											! Exit normally from the processor
/SOLU											! Enter the solution processor
/POST1											! Enter the postprocessor
set,last										! Read the last results set
!set,4,1										! For Response Spectrum analysis, displacements only

ALLSEL											! Select all entities

!!!!!!!!!!!!!!!! USER PARAMETERS !!!!!!!!!!!!!!!!
NUM_OUTPUTS = 1									! Number of surfaces to output
FILENAME = 'FILENAME_NEEDED'					! File name prefix for output
*del,COMP_NAMES
*DIM,COMP_NAMES,string,80,NUM_OUTPUTS			! Define a 1D array of component names

!!! Add each nodal named selection to the array
COMP_NAMES(1,1) = 'flange_1_mate_nodes'
!COMP_NAMES(1,2) = 'flange_2_mate_nodes'		! Example for more than one surface to output
!!!!!!!!!!!!!!! END USER PARAMETERS !!!!!!!!!!!!!!

*del,VALUE
*DIM,VALUE,,NUM_OUTPUTS,7                       ! Define a 2D array to store component name and force reactions (FX, FY, FX, MX, MY, MZ)

*DO,I,1,NUM_OUTPUTS
	cmsel,s,%COMP_NAMES(1,I)%						! Select the nodal component
	/com, Compute reaction forces for %COMP_NAMES(1,I)%
	!rsys,solu
	FSUM											! Sum all nodal forces in global coordinate system
	/com, Reaction forces and moments for TBD %COMP_NAMES(1,I)%
	*get,fsumx,fsum,,item,FX
	VALUE(I,1) = fsumx
	*get,fsumy,fsum,,item,FY
	VALUE(I,2) = fsumy
	*get,fsumz,fsum,,item,FZ
	VALUE(I,3) = fsumz
	*get,msumx,fsum,,item,MX
	VALUE(I,4) = msumx
	*get,msumy,fsum,,item,MY
	VALUE(I,5) = msumy
	*get,msumz,fsum,,item,MZ
	VALUE(I,6) = msumz
*ENDDO


/OUTPUT,JOIN(_wb_userfiles_dir(1), %FILENAME%),csv			! For Static Structural
!/OUTPUT,JOIN(_wb_userfiles_dir_RS(1), %FILENAME%),csv		! For Response Spectrum
!/OUTPUT,JOIN(_wb_userfiles_dir_PSD(1), %FILENAME%),csv		! For Random Vibration
!!!!!! A dash in front of number in a format string left justifies string output
*VWRITE, 'CompName', 'FX[N]', 'FY[N]', 'FZ[N]', 'MX[N-mm]', 'MY[N-mm]', 'MZ[N-mm]'
%-32C, %-18C, %-18C, %-18C, %-18C, %-18C, %-18C
*VWRITE,COMP_NAMES(1),VALUE(1,1),VALUE(1,2),VALUE(1,3),VALUE(1,4),VALUE(1,5),VALUE(1,6)
%-32C, %13.2f, %13.2f, %13.2f, %13.2f, %13.2f, %13.2f

/OUT											! Redirects output to the default location

ALLSEL											! Select all entities
